// COMSOL Multiphysics 6.0.0.318 model "STC_ex_3.1.mph"
// Outline of the model tree

Parameters
  d_outer = 9[mm]
  d_inner = 7.8[mm]
  h_cyl = 10[mm]

Probes
  bnd1: Boundary "Boundary Probe 1" on boundaries 4
    type = integral
    expr = es.nD*es.omega
    unit = A
    frame = spatial
    axisym = 2d
    intsurface = on
  bnd2: Boundary "Boundary Probe 2" (disabled) on boundaries 4
    type = integral
    expr = es.nD / 1[V]
    unit = nF
    frame = spatial
    axisym = 2d
    intsurface = on

Geometry
  geom1 "Geometry 1" (2D axisymmetric, length unit m)
    r1: Rectangle | pos = {d_inner / 2, 0}; size = {(d_outer - d_inner) / 2, h_cyl}
    fin: Finalize "Form Union"

Materials
  mat2: Common "Lead Zirconate Titanate (PZT-19)" on all domains
    def "Basic"
      heatcapacity = 440[J/(kg*K)]
      thermalconductivity = 1.3[W/(m*K)]
      relpermittivity = diag{1704.4, 1704.4, 1433.6}
      density = 7400[kg/m^3]
    StrainCharge "Strain-charge form"
      sE = {1.58e-011[1/Pa], -4.78e-012[1/Pa], -8.45e-012[1/Pa], 0[1/Pa], 0[1/Pa], 0[1/Pa], -4.78e-012[1/Pa], 1.58e-011[1/Pa], -8.45e-012[1/Pa], 0[1/Pa], 0[1/Pa], 0[1/Pa], -8.45e-012[1/Pa], -8.45e-012[1/Pa], 1.68e-011[1/Pa], 0[1/Pa], 0[1/Pa], 0[1/Pa], 0[1/Pa], 0[1/Pa], 0[1/Pa], 4.35e-011[1/Pa], 0[1/Pa], 0[1/Pa], 0[1/Pa], 0[1/Pa], 0[1/Pa], 0[1/Pa], 4.35e-011[1/Pa], 0[1/Pa], 0[1/Pa], 0[1/Pa], 0[1/Pa], 0[1/Pa], 0[1/Pa], 4.26e-011[1/Pa]}
      dET = {0[C/N], 0[C/N], -1.55e-010[C/N], 0[C/N], 0[C/N], -2.74e-010[C/N], 0[C/N], 0[C/N], 3.60e-010[C/N], 0[C/N], 7.41e-010[C/N], 0[C/N], 7.41e-010[C/N], 0[C/N], 0[C/N], 0[C/N], 0[C/N], 0[C/N]}
      epsilonrT = diag{3130, 3130, 1650}
      eta_sE = {0, 0, 0, 0, 0, 0, 0, 0, 0, 0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}
      eta_dET = {0, 0, 0, 0, 0, 0, 0, 0, 0, 0, 0, 0, 0, 0, 0, 0, 0, 0}
      eta_epsilonT = 0
    StressCharge "Stress-charge form"
      cE = {1.27205e+011[Pa], 8.02122e+010[Pa], 8.46702e+010[Pa], 0[Pa], 0[Pa], 0[Pa], 8.02122e+010[Pa], 1.27205e+011[Pa], 8.46702e+010[Pa], 0[Pa], 0[Pa], 0[Pa], 8.46702e+010[Pa], 8.46702e+010[Pa], 1.17436e+011[Pa], 0[Pa], 0[Pa], 0[Pa], 0[Pa], 0[Pa], 0[Pa], 2.29885e+010[Pa], 0[Pa], 0[Pa], 0[Pa], 0[Pa], 0[Pa], 0[Pa], 2.29885e+010[Pa], 0[Pa], 0[Pa], 0[Pa], 0[Pa], 0[Pa], 0[Pa], 2.34742e+010[Pa]}
      eES = {0[C/m^2], 0[C/m^2], -6.62281[C/m^2], 0[C/m^2], 0[C/m^2], -6.62281[C/m^2], 0[C/m^2], 0[C/m^2], 23.2403[C/m^2], 0[C/m^2], 17.0345[C/m^2], 0[C/m^2], 17.0345[C/m^2], 0[C/m^2], 0[C/m^2], 0[C/m^2], 0[C/m^2], 0[C/m^2]}
      epsilonrS = diag{1704.4, 1704.4, 1433.6}
      eta_cE = {0, 0, 0, 0, 0, 0, 0, 0, 0, 0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}
      eta_eES = {0, 0, 0, 0, 0, 0, 0, 0, 0, 0, 0, 0, 0, 0, 0, 0, 0, 0}
      eta_epsilonS = 0

Physics
  solid: SolidMechanics on all domains
    dependent variable u = {u, v, w}
    lemm1: LinearElasticModel "Linear Elastic Material 1" (default)
    axi1: AxialSymmetrySolid "Axial Symmetry 1" (default)
    free1: Free (default)
    init1: init "Initial Values 1" (default)
    pzm1: PiezoelectricMaterialModel "Piezoelectric Material 1" on all domains
      ConstitutiveRelation = StrainCharge
      coordinateSystem = comp1_zx_sys
  es: Electrostatics on all domains
    dependent variable V
    ccn1: ChargeConservation (default) | materialType = from_mat
    axi1: AxialSymmetry (default)
    zc1: ZeroCharge (default)
    init1: init "Initial Values 1" (default)
    ccnp1: ChargeConservationPiezo "Charge Conservation, Piezoelectric 1" on all domains
    pot1: ElectricPotential on boundaries 4 | V0 = 1
    gnd1: Ground on boundaries 1

Multiphysics
  pze1: PiezoelectricEffect on all domains | Solid_physics = solid; Electrostatics_physics = es

Mesh
  mesh1 "Mesh 1"
    size: MeshSizeDefault | hauto = 2
    map1: Map "Mapped 1" on remaining entities

Studies
  std1 "Study 1"
    freq: Frequency "Frequency Domain" | punit = kHz; plist = range(50,0.05,200)
  std2 "Study 2"
    stat: Stationary

Solver configurations
  sol1 "Solution 1" (study std1)
    v1: Variables "Dependent Variables 1"
    s1: Stationary "Stationary Solver 1"
      dDef: Direct
      p1: Parametric | pname = freq; plistarr = range(50,0.05,200); punit = kHz; pcontinuationmode = no
      fc1: FullyCoupled | linsolver = dDef
  sol2 "Solution 2" (study std2)
    v1: Variables "Dependent Variables 1"
    s1: Stationary "Stationary Solver 1" | stol = 0.05
      dDef: Direct
      fc1: FullyCoupled | linsolver = dDef

Datasets
  dset1: Solution | solution = sol1
  rev1: Revolve2D "Revolution 2D 1" | data = dset1; startangle = -90; revangle = 225; modenumber = solid.mk
  rev2: Revolve2D "Revolution 2D 2" | data = dset1; startangle = -90; revangle = 225
  dset2: Solution "Probe Solution 2" | solution = sol1
  int1: Integral "Boundary Probe 1" on boundaries 4 | data = dset2
  dset3: Solution | solution = sol2
  int2: Integral "Boundary Probe 2" on boundaries 4 | data = dset2
  rev3: Revolve2D "Revolution 2D 3" | data = dset3; method = pointdir; startangle = -30; revangle = 240

Derived values
  pev1: EvalPoint "Boundary Probe 1" | data = int1; table = new; expr = es.nD*es.omega
  pev2: EvalPoint "Boundary Probe 2" | data = int2; table = new; expr = es.nD / 1[V]
  pev3: EvalPoint "Point Evaluation 3" on points 4 | data = dset1; table = tbl8; expr = abs(bnd1)/1[V]

Tables
  tbl2: Table "Capacity"
    es.nD / 1[V] (nF), Boundary Probe 2
    6.40463
  tbl6: Table "abs(Y)"
    // Boundary Probe 1
    freq (kHz) | abs(bnd1) / 1[V] (S), Boundary Probe 1
    50 | 0.00219424
    50.05 | 0.00219688
    50.1 | 0.00219951
    50.15 | 0.00220215
    50.2 | 0.00220479
    50.25 | 0.00220743
    50.3 | 0.00221007
    50.35 | 0.00221272
    50.4 | 0.00221536
    50.45 | 0.00221801
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  tbl8: Table "Point evaluation abs(Y)"
    // Point Evaluation 3
    freq (kHz) | abs(bnd1)/1[V] (S), Point: 4
    50 | 0.00219424
    50.05 | 0.00219688
    50.1 | 0.00219951
    50.15 | 0.00220215
    50.2 | 0.00220479
    50.25 | 0.00220743
    50.3 | 0.00221007
    50.35 | 0.00221272
    50.4 | 0.00221536
    50.45 | 0.00221801
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
Plots
  pg1: PlotGroup1D "Electrical conductance vs frequency"
    data = dset1
    xlabel = Frequency, kHz
    ylabel = Absolute electrical conductance, S
    tblp2: Table "point evaluation" (disabled) | table = tbl8
    tblp1: Table "abs(Y)" | table = tbl6

Exports
  plot1: Plot "Electrical conductance vs frequency"
  tbl1: Table "abs(Y)" | table = tbl6
  tbl2: Table "Capacity" | table = tbl2