// COMSOL Multiphysics 6.0.0.318 model "STC_ex_3.2.mph"
// Outline of the model tree

Parameters
  d_outer = 9[mm]
  d_inner = 7.8[mm]
  h_cyl = 10[mm]

Geometry
  geom1 "Geometry 1" (2D axisymmetric, length unit m)
    r1: Rectangle | pos = {d_inner / 2, 0}; size = {(d_outer - d_inner) / 2, h_cyl}
    r2: Rectangle | pos = {0, -(h_cyl )/4}; size = {d_outer + d_outer/2, h_cyl + h_cyl/2}
    fin: Finalize "Form Union"

Materials
  mat1: Common "Water, liquid" on domains 1
    def "Basic"
      thermalexpansioncoefficient = alpha_p(T)
      bulkviscosity = muB(T)
      dynamicviscosity = eta(T)
      ratioofspecificheat = gamma_w(T)
      electricconductivity = 5.5e-6[S/m]
      heatcapacity = Cp(T)
      density = rho(T)
      thermalconductivity = k(T)
      soundspeed = cs(T)
      eta: Piecewise
        arg = T
        pieces = 
          {273.15, 413.15, 1.3799566804-0.021224019151*T^1+1.3604562827E-4*T^2-4.6454090319E-7*T^3+8.9042735735E-10*T^4-9.0790692686E-13*T^5+3.8457331488E-16*T^6}
          {413.15, 553.75, 0.00401235783-2.10746715E-5*T^1+3.85772275E-8*T^2-2.39730284E-11*T^3}
        argunit = K
        fununit = Pa*s
      Cp: Piecewise | arg = T; pieces = {273.15, 553.75, 12010.1471-80.4072879*T^1+0.309866854*T^2-5.38186884E-4*T^3+3.62536437E-7*T^4}; argunit = K; fununit = J/(kg*K)
      rho: Piecewise
        arg = T
        smooth = contd1
        pieces = 
          {273.15, 293.15, 6.3092789034e-05*T^3-0.0603676398829*T^2+18.9229382407066*T-950.704055329848}
          {293.15, 373.15, 1.0335053319e-05*T^3-0.0133950656345*T^2+4.96928883266*T+432.257114008512}
        argunit = K
        fununit = kg/m^3
      k: Piecewise | arg = T; pieces = {273.15, 553.75, -0.869083936+0.00894880345*T^1-1.58366345E-5*T^2+7.97543259E-9*T^3}; argunit = K; fununit = W/(m*K)
      cs: Interpolation | table = {{273, 1403}, {278, 1427}, {283, 1447}, {293, 1481}, {303, 1507}, {313, 1526}, {323, 1541}, {333, 1552}, {343, 1555}, {353, 1555}, {363, 1550}, {373, 1543}}; interp = piecewisecubic; fununit = m/s; argunit = K
      an1: Analytic | funcname = alpha_p; expr = -1/rho(T)*d(rho(T),T); args = T; fununit = 1/K; argunit = K
      an2: Analytic | funcname = gamma_w; expr = 1+(T/Cp(T))*(alpha_p(T)*cs(T))^2; args = T; fununit = 1; argunit = K
      an3: Analytic | funcname = muB; expr = 2.79*eta(T); args = T; fununit = Pa*s; argunit = K
  mat2: Common "Lead Zirconate Titanate (PZT-19)" on domains 2
    def "Basic"
      heatcapacity = 440[J/(kg*K)]
      thermalconductivity = 1.3[W/(m*K)]
      relpermittivity = diag{1704.4, 1704.4, 1433.6}
      density = 7400[kg/m^3]
    StrainCharge "Strain-charge form"
      sE = {1.58e-011[1/Pa], -4.78e-012[1/Pa], -8.45e-012[1/Pa], 0[1/Pa], 0[1/Pa], 0[1/Pa], -4.78e-012[1/Pa], 1.58e-011[1/Pa], -8.45e-012[1/Pa], 0[1/Pa], 0[1/Pa], 0[1/Pa], -8.45e-012[1/Pa], -8.45e-012[1/Pa], 1.68e-011[1/Pa], 0[1/Pa], 0[1/Pa], 0[1/Pa], 0[1/Pa], 0[1/Pa], 0[1/Pa], 4.35e-011[1/Pa], 0[1/Pa], 0[1/Pa], 0[1/Pa], 0[1/Pa], 0[1/Pa], 0[1/Pa], 4.35e-011[1/Pa], 0[1/Pa], 0[1/Pa], 0[1/Pa], 0[1/Pa], 0[1/Pa], 0[1/Pa], 4.26e-011[1/Pa]}
      dET = {0[C/N], 0[C/N], -1.55e-010[C/N], 0[C/N], 0[C/N], -2.74e-010[C/N], 0[C/N], 0[C/N], 3.60e-010[C/N], 0[C/N], 7.41e-010[C/N], 0[C/N], 7.41e-010[C/N], 0[C/N], 0[C/N], 0[C/N], 0[C/N], 0[C/N]}
      epsilonrT = diag{3130, 3130, 1650}
      eta_sE = {0, 0, 0, 0, 0, 0, 0, 0, 0, 0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}
      eta_dET = {0, 0, 0, 0, 0, 0, 0, 0, 0, 0, 0, 0, 0, 0, 0, 0, 0, 0}
      eta_epsilonT = 0
    StressCharge "Stress-charge form"
      cE = {1.27205e+011[Pa], 8.02122e+010[Pa], 8.46702e+010[Pa], 0[Pa], 0[Pa], 0[Pa], 8.02122e+010[Pa], 1.27205e+011[Pa], 8.46702e+010[Pa], 0[Pa], 0[Pa], 0[Pa], 8.46702e+010[Pa], 8.46702e+010[Pa], 1.17436e+011[Pa], 0[Pa], 0[Pa], 0[Pa], 0[Pa], 0[Pa], 0[Pa], 2.29885e+010[Pa], 0[Pa], 0[Pa], 0[Pa], 0[Pa], 0[Pa], 0[Pa], 2.29885e+010[Pa], 0[Pa], 0[Pa], 0[Pa], 0[Pa], 0[Pa], 0[Pa], 2.34742e+010[Pa]}
      eES = {0[C/m^2], 0[C/m^2], -6.62281[C/m^2], 0[C/m^2], 0[C/m^2], -6.62281[C/m^2], 0[C/m^2], 0[C/m^2], 23.2403[C/m^2], 0[C/m^2], 17.0345[C/m^2], 0[C/m^2], 17.0345[C/m^2], 0[C/m^2], 0[C/m^2], 0[C/m^2], 0[C/m^2], 0[C/m^2]}
      epsilonrS = diag{1704.4, 1704.4, 1433.6}
      eta_cE = {0, 0, 0, 0, 0, 0, 0, 0, 0, 0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}
      eta_eES = {0, 0, 0, 0, 0, 0, 0, 0, 0, 0, 0, 0, 0, 0, 0, 0, 0, 0}
      eta_epsilonS = 0

Physics
  acpr: PressureAcoustics "Pressure Acoustics, Frequency Domain" on domains 1
    dependent variable p
    MeshControl.ElementsPerWavelength = UserDefined
    MeshControl.nperlambda = 8
    ReferencePressure.ReferenceType = ReferencePressureWater
    cref.cref = 1500[m/s]
    fpam1: FrequencyPressureAcousticsModel "Pressure Acoustics 1" (default)
    axi1: AxialSymmetry (default)
    shb1: SoundHard "Sound Hard Boundary (Wall) 1" (default)
    init1: init "Initial Values 1" (default)
    pmb1: PerfectlyMatchedBoundary on boundaries 2, 3, 8 | directionType = normal
    pwr1: PlaneWaveRadiation (disabled) on boundaries 8
      ipf1: IncidentPressureField on all boundaries
        dir_pwe = {-1, 0, 0}
        dir = {0, 0, -1}
        PressureFieldType = PlaneWave
        pamp = 1
        PressureAmplitudeCylindrical = 1
        PlaneWaveExpansion = 1
        c = 1500
  solid: SolidMechanics on domains 2
    dependent variable u = {u, v, w}
    lemm1: LinearElasticModel "Linear Elastic Material 1" (default)
    axi1: AxialSymmetrySolid "Axial Symmetry 1" (default)
    free1: Free (default)
    init1: init "Initial Values 1" (default)
    pzm1: PiezoelectricMaterialModel "Piezoelectric Material 1" on all domains
      ConstitutiveRelation = StrainCharge
      coordinateSystem = comp1_zx_sys
    bndl1: BoundaryLoad on boundaries 7
      LoadType = FollowerPressure
      FollowerPressure = -1
      coordinateSystem = comp1_zx_sys
  es: Electrostatics on domains 2
    dependent variable V
    ccn1: ChargeConservation (default) | coordinateSystem = comp1_zx_sys
    axi1: AxialSymmetry (default)
    zc1: ZeroCharge (default)
    init1: init "Initial Values 1" (default)
    ccnp1: ChargeConservationPiezo "Charge Conservation, Piezoelectric 1" on all domains
    gnd1: Ground on boundaries 4
    fp1: FloatingPotential on boundaries 7

Multiphysics
  asb1: AcousticStructureBoundary on all boundaries | Acoustics_physics = acpr; Structure_physics = solid
  pze1: PiezoelectricEffect on all domains | Solid_physics = solid; Electrostatics_physics = es

Mesh
  mesh1 "Mesh 1"
    size: MeshSizeDefault | hmax = 5.55E-4; hmin = 1.88E-6; hcurve = 0.25; hgrad = 1.25; hauto = 3
    map1: Map "Mapped 1" on domains 2
      size1: Size on domains 2 | hauto = 1
    bl1: BndLayer "Boundary Layers 1" on domains 1
      blp: BndLayerProp "Boundary Layer Properties" on no boundaries | blnlayers = 7

Studies
  std1 "Study 1"
    freq: Frequency "Frequency Domain" | plist = 1, 10, 50, range(100,100,150000)

Solver configurations
  sol1 "Solution 1" (study std1)
    v1: Variables "Dependent Variables 1"
    s1: Stationary "Stationary Solver 1"
      dDef: Direct
      p1: Parametric | pname = freq; plistarr = 1, 10, 50, range(100,100,150000); punit = Hz; pcontinuationmode = no
      fc1: FullyCoupled | linsolver = dDef

Datasets
  dset1: Solution | solution = sol1
  rev1: Revolve2D "Revolution 2D 1" | data = dset1; startangle = -90; revangle = 225
  rev2: Revolve2D "Revolution 2D 2" | data = dset1; startangle = -90; revangle = 225; modenumber = solid.mk

Derived values
  pev1: EvalPoint "Point Evaluation 1" on points 6 | data = dset1; table = new; expr = abs(es.fp1.V0); unit = V

Tables
  tbl12: Table "2d_float_potential_water"
    // Point Evaluation 1
    freq (Hz) | abs(es.fp1.V0) (V), Point: 6
    1 | 7.646e-05
    10 | 7.646e-05
    50 | 7.64601e-05
    100 | 7.64602e-05
    200 | 7.64607e-05
    300 | 7.64615e-05
    400 | 7.64626e-05
    500 | 7.6464e-05
    600 | 7.64658e-05
    700 | 7.64679e-05
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
Plots
  pg17: PlotGroup1D "Floating potential plane wave" | data = none; ylabel = Sensitivity, uV/Pa
    tblp3: Table "Boundary load 1 pa" | table = tbl12; legends = Resonance sensitivity 770 uV/Pa

Exports
  plot1: Plot "Floating potential plane wave"